*HEADING
chassis FEA
*NODE
1,1.03606325e+02,-9.33008335e+01,0.00000000e+00
2,9.33008335e+01,-1.03606325e+02,0.00000000e+00
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*ELEMENT,TYPE=C3D4,ELSET=EALL
1,11028,15010,11093,15193
2,7036,15011,4411,15157
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*NSET,NSET=NFIX
22,23,28,34,78,79
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*NSET,NSET=NLOAD1
29,31,39,85,87,95
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*NSET,NSET=NLOAD2
36,37,38,92,93,94
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*NSET,NSET=NLOAD3
19,20,33,75,76,89
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*NSET,NSET=NLOAD4
17,25,27,73,81,83
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*MATERIAL,NAME=PETG
*ELASTIC
2100.0,0.360
*SOLID SECTION,ELSET=EALL,MATERIAL=PETG
*BOUNDARY
NFIX,1,3,0.0
*STEP
*STATIC
*CLOAD
29,3,0.071599
31,3,0.071599
39,3,0.071599
85,3,0.071599
87,3,0.071599
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15219,3,0.072464
*NODE FILE
U
*EL FILE
S
*END STEP
